// COMSOL Multiphysics 6.3.0.290 model "high_voltage_insulator.mph"
// High Voltage Insulator
// This example demonstrates how to use the Electrostatics interface to calculate the surface electric field of a typical high voltage insulator. It is shown that the inhomogeneity and the maximum of the surface electric field are greatly reduced with the installation of the grading rings. In this way, the high voltage insulator is able to withstand a higher flashover voltage.
// Outline of the model tree

Parameters
  Vi = 500[kV]  // Overvoltage amplitude
  H = 30[mm]  // Thickness of the grading ring
  D = 350[mm]  // Diameter of the grading ring
  d = 150[mm]  // Distance of the grading ring from the end

Selections
  sel1: Explicit "Shed Surface" on boundaries 22-33, 57-62, 78-83

Geometry
  geom1 "Geometry 1" (2D axisymmetric, length unit mm)
    r1: Rectangle | size = {12, 100}
    r2: Rectangle | size = {6, 1050}; pos = {0, 50}
    r3: Rectangle | size = {12, 100}; pos = {0, 1050}
    cc1: CompositeCurve
      pol1: Polygon | type = open; source = table; table = {{12, 100}, {12, 150}, {60, 150}, {20, 153}}
      qb1: QuadraticBezier "Quadratic Bézier 1" | p = {{20, 13, 12}, {153, 154, 161}}; w = {1, 1, 1}
      pol2: Polygon | type = open; source = table; table = {{12, 161}, {12, 200}, {60, 200}, {20, 203}}
      qb2: QuadraticBezier "Quadratic Bézier 2" | p = {{20, 13, 12}, {203, 204, 211}}; w = {1, 1, 1}
      pol3: Polygon | type = open; source = table; table = {{12, 211}, {12, 250}, {80, 250}, {20, 253}}
      qb3: QuadraticBezier "Quadratic Bézier 3" | p = {{20, 13, 12}, {253, 254, 261}}; w = {1, 1, 1}
    arr1: Array | input = cc1; size = 5; type = linear; linearsize = 5; displ = {0, 161}
    cc2: CompositeCurve
      pol1: Polygon | type = open; source = table; table = {{12, 111}, {12, 150}, {60, 150}, {20, 153}}
      qb1: QuadraticBezier "Quadratic Bézier 1" | p = {{20, 13, 12}, {153, 154, 161}}; w = {1, 1, 1}
      pol2: Polygon | type = open; source = table; table = {{12, 161}, {12, 200}, {60, 200}, {20, 203}}
      qb2: QuadraticBezier "Quadratic Bézier 2" | p = {{20, 13, 12}, {203, 204, 211}}; w = {1, 1, 1}
      pol3: Polygon | type = open; source = table; table = {{12, 211}, {12, 256}, {6, 256}, {6, -694}, {12, -694}}
    mov1: Move | input = cc2; displx = 0; disply = 794
    csol1: ConvertToSolid | input = arr1, mov1
    fil1: Fillet | point = r1(1) points 2; r3(1) points 3; radius = 8
    c1: Circle | r = 2[m]; angle = 180; pos = {0, 500}; rot = -90; iscircularsectorold = on
    c2: Circle | r = H/2; pos = {D/2, d}
    c3: Circle | r = H/2; pos = {D/2, 1150-d}
    fin: Finalize "Form Union"

Materials
  mat1: Common "Core Rod" on domains 3-5
    def: def "Basic"
      relpermittivity = 5
  mat2: Common "Weather Shed" on domains 7
    def: def "Basic"
      relpermittivity = 3

Physics
  es: Electrostatics on all domains
    dependent variable V
    fsp1: FreeSpace (default)
    axi1: AxialSymmetry (default)
    zc1: ZeroCharge (default)
    init1: init "Initial Values 1" (default)
    ccns1: ChargeConservationSolid "Charge Conservation in Solids 1" on domains 3-5, 7
    term1: DomainTerminal "Metal Fitting, Line End" on domains 2 | TerminalType = Voltage; V0 = Vi
    term2: DomainTerminal "Metal Fitting, Ground End" on domains 6 | TerminalType = Voltage; V0 = 0
    term3: DomainTerminal "Grading Ring, Line End" on domains 8 | TerminalType = Voltage; V0 = Vi
    term4: DomainTerminal "Grading Ring, Ground End" on domains 9 | TerminalType = Voltage; V0 = 0

Mesh
  mesh1 "Mesh 1" (physics-controlled)

Studies
  std1 "Study 1, Without Grading Rings"
    stat: Stationary
  std2 "Study 2, With Grading Rings"
    stat: Stationary

Solver configurations
  sol1 "Solution 1" (study std1)
    v1: Variables "Dependent Variables 1"
    s1: Stationary "Stationary Solver 1"
      dDef: Direct
      fc1: FullyCoupled
  sol2 "Solution 2" (study std2)
    // same settings as sol1

Datasets
  dset1: Solution on domains 2-7 | solution = sol1
  rev1: Revolve2D "Revolution 2D 1" | data = dset1; startangle = -90
  dset2: Solution on domains 2-9 | solution = sol2
  rev2: Revolve2D "Revolution 2D 2" | data = dset2; startangle = -90

Plots
  pg1: PlotGroup2D "Electric Potential, Without Grading Rings" | data = dset1; dataisaxisym = on
    surf1: Surface | expr = V
    str1: Streamline on boundaries 1-94 | expr = {es.Er, es.Ez}; udist = 0.005; maxsteps = 5000
      col1: Color "Color Expression 1" | expr = V
      filt1: Filter | expr = !isScalingSystemDomain
  pg2: PlotGroup3D "Electric Potential, Revolved Geometry (es)" | data = rev1
    vol1: Volume | expr = V
  pg3: PlotGroup2D "Electric Field (es)" | data = dset1; dataisaxisym = on
    surf1: Surface | expr = es.normE
    str1: Streamline on boundaries 1-94 | expr = {es.Er, es.Ez}; udist = 0.005; maxsteps = 5000
      col1: Color "Color Expression 1" | expr = es.normE
      filt1: Filter | expr = !isScalingSystemDomain
  pg4: PlotGroup2D "Electric Potential, With Grading Rings" | data = dset2; dataisaxisym = on
    surf1: Surface | expr = V
    str1: Streamline on boundaries 1-102 | expr = {es.Er, es.Ez}; udist = 0.005; maxsteps = 5000
      col1: Color "Color Expression 1" | expr = V
      filt1: Filter | expr = !isScalingSystemDomain
  pg5: PlotGroup3D "Electric Potential, Revolved Geometry (es) 1" | data = rev2
    vol1: Volume | expr = V
  pg6: PlotGroup2D "Electric Field (es) 1" | data = dset2; dataisaxisym = on
    surf1: Surface | expr = es.normE
    str1: Streamline on boundaries 1-102 | expr = {es.Er, es.Ez}; udist = 0.005; maxsteps = 5000
      col1: Color "Color Expression 1" | expr = es.normE
      filt1: Filter | expr = !isScalingSystemDomain
  pg7: PlotGroup1D "Tangential Electric Field, z-Component" | data = dset1
    lngr1: LineGraph "Without Grading Rings" on selection sel1
      data = dset1
      expr = es.tEz
      unit = kV/cm
      xdata = expr
      xdataexpr = z
      autoplotlabel = on
      autosolution = off
    lngr2: LineGraph "With Grading Rings" on selection sel1
      data = dset2
      expr = es.tEz
      unit = kV/cm
      xdata = expr
      xdataexpr = z
      autoplotlabel = on
      autosolution = off